*Heading
** Job name: abaqusModel3 Model name: abaqusModel8
** Generated by: Abaqus/CAE 2018
*Preprint, echo=NO, model=NO, history=NO, contact=NO
**
** PARTS
**
*Part, name=PART-1
*Node
  55873,  0.932596266,  0.137140319,  0.108453549
  55874,  0.959725499,  0.176935971,  0.157546014
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*Element, type=C3D8R
112053, 60467, 60469, 60523, 60521, 61665, 61667, 61724, 61723
112054, 60467, 61665, 61723, 60521, 60466, 61664, 61722, 60520
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*Elset, elset=Gyroid, generate
 112053,  141028,       1
** Section: Gyroid
*Solid Section, elset=Gyroid, material=Material-1
,
*End Part
**
*Part, name=Round
*Node
      1,           5.,           0.,           2.
      2,           5.,           0.,           0.
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*Element, type=R3D4
 1,  1,  3, 44,  2
 2,  3,  4, 43, 44
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*Element, type=R3D3
23, 63,  4,  3
24, 79, 78, 76
25, 76, 67, 70
26, 84, 58, 45
79, 107,  25,  24
80, 123, 122, 120
81, 120, 111, 114
82, 128, 102,  89
*Node
    133,           0.,           0.,           0.
*Nset, nset=Round-RefPt_, internal
133,
*Elset, elset=Round, generate
   1,  134,    1
*End Part
**
**
** ASSEMBLY
**
*Assembly, name=Assembly
**
*Instance, name=PART-1-1, part=PART-1
         -3.,          -3.,           0.
*End Instance
**
*Instance, name=Round-1, part=Round
          0.,           0.,           6.
*End Instance
**
*Instance, name=Round-2, part=Round
          0.,           0.,          -2.
*End Instance
**
*Elset, elset=AUTO, instance=PART-1-1, generate
 112053,  141028,       1
*Nset, nset=Set-2, instance=Round-2
 133,
*Nset, nset=Set-3, instance=Round-1
 133,
*Rigid Body, ref node=Round-1.Round-RefPt_, elset=Round-1.Round
*Rigid Body, ref node=Round-2.Round-RefPt_, elset=Round-2.Round
*End Assembly
*Amplitude, name=Amp-1
             0.,              0.,              3.,              1.
**
** MATERIALS
**
*Material, name=Material-1
*Damage Initiation, criterion=DUCTILE
 0.12, 0.33,   0.
*Damage Evolution, type=DISPLACEMENT
 0.12,
*Density
7140.,
*Elastic
 3e+10, 0.25
*Plastic
 1.18e+08,    0.
 1.25e+08, 0.003
  1.3e+08, 0.006
 1.34e+08, 0.009
 1.37e+08, 0.012
 1.39e+08, 0.015
 1.41e+08, 0.018
 1.43e+08, 0.024
 1.45e+08, 0.036
 1.46e+08, 0.042
 1.48e+08, 0.048
 1.49e+08, 0.054
  1.5e+08, 0.084
     151., 0.118
**
** INTERACTION PROPERTIES
**
*Surface Interaction, name=IntProp-1
*Friction
 0.125,
** ----------------------------------------------------------------
**
** STEP: Step-1
**
*Step, name=Step-1, nlgeom=YES
*Dynamic, Explicit
, 3.
*Bulk Viscosity
0.06, 1.2
**
** BOUNDARY CONDITIONS
**
** Name: BC-1 Type: Displacement/Rotation
*Boundary
Set-2, 1, 1
Set-2, 2, 2
Set-2, 3, 3
Set-2, 4, 4
Set-2, 5, 5
Set-2, 6, 6
** Name: BC-2 Type: Displacement/Rotation
*Boundary, amplitude=Amp-1
Set-3, 1, 1
Set-3, 2, 2
Set-3, 3, 3, -2.
Set-3, 4, 4
Set-3, 5, 5
Set-3, 6, 6
**
** INTERACTIONS
**
** Interaction: Int-1
*Contact, op=NEW
*Contact Inclusions, ALL EXTERIOR
*Contact Property Assignment
 ,  , IntProp-1
**
** OUTPUT REQUESTS
**
*Restart, write, number interval=1, time marks=NO
**
** FIELD OUTPUT: F-Output-2
**
*Output, field
*Node Output
A, RF, RT, U, V
**
** FIELD OUTPUT: F-Output-1
**
*Output, field, variable=PRESELECT, number interval=40
**
** HISTORY OUTPUT: H-Output-1
**
*Output, history, variable=PRESELECT
*End Step
